**
** Heading +++++++++++++++++++++++++++++++++++++++++++++++++
**
*Heading
Hash: fKZd360B, Date: 07/23/2024, Unit system: MM_TON_S_C
**
** Nodes +++++++++++++++++++++++++++++++++++++++++++++++++++
**
*Node
1, 3.30000000E+001, 0.00000000E+000, 0.00000000E+000
2, 3.30000000E+001, 0.00000000E+000, 1.00000000E+002
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**
** Elements ++++++++++++++++++++++++++++++++++++++++++++++++
**
*Element, Type=S4, Elset=Shell_part-1
1, 5, 1, 114, 675
2, 6, 5, 675, 676
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*Element, Type=S3, Elset=Shell_part-1
7343, 11815, 11985, 11968
11645, 12975, 12988, 12969
11972, 11888, 11958, 11832
12551, 12989, 12996, 12995
20596, 22284, 22273, 22460
21950, 20857, 20856, 21097
22111, 20733, 20998, 20734
22902, 22216, 22169, 22312
**
** Node sets +++++++++++++++++++++++++++++++++++++++++++++++
**
*Nset, Nset=Internal_Selection-1_Rigid_Body-1
1, 3, 114, 115, 116, 117
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*Nset, Nset=Internal_Selection-1_Rigid_Body-2
2, 4, 336, 337, 338, 339
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*Nset, Nset=Node_Set-1
1, 3, 114, 115, 116, 117
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*Nset, Nset=Reference_Point-1_ref_25314
25314
*Nset, Nset=Reference_Point-1_rot_25315
25315
*Nset, Nset=Reference_Point-2_ref_25316
25316
*Nset, Nset=Reference_Point-2_rot_25317
25317
**
** Element sets ++++++++++++++++++++++++++++++++++++++++++++
**
**
** Surfaces ++++++++++++++++++++++++++++++++++++++++++++++++
**
**
** Physical constants ++++++++++++++++++++++++++++++++++++++
**
**
** Materials +++++++++++++++++++++++++++++++++++++++++++++++
**
*Material, Name=Material-1
*Elastic
208000, 0.3
*Plastic
250, 0
**
** Sections ++++++++++++++++++++++++++++++++++++++++++++++++
**
*Shell section, Elset=Shell_part-1, Material=Material-1, Offset=0
0.1
**
** Pre-tension sections ++++++++++++++++++++++++++++++++++++
**
**
** Constraints +++++++++++++++++++++++++++++++++++++++++++++
**
*Rigid body, Nset=Internal_Selection-1_Rigid_Body-1, Ref node=25314, Rot node=25315
*Rigid body, Nset=Internal_Selection-1_Rigid_Body-2, Ref node=25316, Rot node=25317
**
** Surface interactions ++++++++++++++++++++++++++++++++++++
**
**
** Contact pairs +++++++++++++++++++++++++++++++++++++++++++
**
**
** Amplitudes ++++++++++++++++++++++++++++++++++++++++++++++
**
**
** Initial conditions ++++++++++++++++++++++++++++++++++++++
**
**
** Steps +++++++++++++++++++++++++++++++++++++++++++++++++++
**
**
** Step-1 ++++++++++++++++++++++++++++++++++++++++++++++++++
**
*Step, Inc=100
*Static
0.1, 1, 1E-05, 0.1
**
** Controls ++++++++++++++++++++++++++++++++++++++++++++++++
**
**
** Output frequency ++++++++++++++++++++++++++++++++++++++++
**
*Output, Frequency=1
**
** Boundary conditions +++++++++++++++++++++++++++++++++++++
**
*Boundary, op=New
** Name: Fixed-1
*Boundary
25316, 1, 3, 0
25317, 1, 3, 0
** Name: Displacement_Rotation-1
*Boundary
25314, 1, 1, 0
25314, 2, 2, 0
25315, 1, 1, 0
25315, 2, 2, 0
25315, 3, 3, 0
** Name: Displacement_Rotation-2
*Boundary
25314, 3, 3, 0.1
**
** Loads +++++++++++++++++++++++++++++++++++++++++++++++++++
**
*Cload, op=New
*Dload, op=New
**
** Defined fields ++++++++++++++++++++++++++++++++++++++++++
**
**
** History outputs +++++++++++++++++++++++++++++++++++++++++
**
*Node print, Nset=Reference_Point-2_ref_25316, Totals=Yes
RF
*Node print, Nset=Reference_Point-2_rot_25317, Totals=Yes
RF
*Node print, Nset=Reference_Point-1_ref_25314, Totals=Yes
U
*Node print, Nset=Reference_Point-1_rot_25315, Totals=Yes
U
** Name: RP-Only: Deactivated
** Name: RP2-Yes: Deactivated
** Name: RP2-No: Deactivated
** Name: RP2-Only: Deactivated
*Node print, Nset=Reference_Point-1_ref_25314, Totals=Yes
RF
*Node print, Nset=Reference_Point-1_rot_25315, Totals=Yes
RF
*Node print, Nset=Node_Set-1
U
*Node print, Nset=Node_Set-1
RF
**
** Field outputs +++++++++++++++++++++++++++++++++++++++++++
**
*Node file
RF, U
*El file
S, E, NOE
**
** End step ++++++++++++++++++++++++++++++++++++++++++++++++
**
*End step
