**
** Heading +++++++++++++++++++++++++++++++++++++++++++++++++
**
*Heading
Hash: dAmoBBIb, Date: 07/23/2024, Unit system: MM_TON_S_C
**
** Nodes +++++++++++++++++++++++++++++++++++++++++++++++++++
**
*Node
1, -2.07243282E+003, 0.00000000E+000, 2.53800000E-013
2, -2.07243282E+003, 6.00000000E+002, 2.53800000E-013
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**
** Elements ++++++++++++++++++++++++++++++++++++++++++++++++
**
*Element, Type=S4, Elset=Shell_part-1
1, 69, 1, 85, 1985
2, 70, 69, 1985, 1986
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*Element, Type=S3, Elset=Shell_part-1
21, 2013, 1999, 1998
48, 89, 2001, 88
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**
** Node sets +++++++++++++++++++++++++++++++++++++++++++++++
**
*Nset, Nset=Internal_Selection-1_Rigid_Body-1
2, 4, 67, 68, 88, 89
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*Nset, Nset=Internal_Selection-1_Rigid_Body-2
33, 34, 35, 38, 689, 690
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*Nset, Nset=Reference_Point-1_ref_14107
14107
*Nset, Nset=Reference_Point-1_rot_14108
14108
*Nset, Nset=Reference_Point-2_ref_14109
14109
*Nset, Nset=Reference_Point-2_rot_14110
14110
**
** Element sets ++++++++++++++++++++++++++++++++++++++++++++
**
*Elset, Elset=Internal_Selection-1_Shell_Section-2
1, 2, 3, 4, 5, 6
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*Elset, Elset=Internal_Selection-1_Shell_Section-1
3195, 3196, 3197, 3198, 3199, 3200
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*Elset, Elset=Internal_Selection-1_Shell_Section-3
2706, 2707, 2708, 2709, 2710, 2711
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*Elset, Elset=Internal_Selection-1_Shell_Section-4
1407, 1408, 1409, 1410, 1411, 1412
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*Elset, Elset=Internal_Selection-1_Shell_Section-5
474, 475, 476, 477, 478, 479
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*Elset, Elset=Internal_Selection-1_Shell_Section-6
50, 51, 52, 53, 54, 55
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**
** Surfaces ++++++++++++++++++++++++++++++++++++++++++++++++
**
**
** Physical constants ++++++++++++++++++++++++++++++++++++++
**
**
** Materials +++++++++++++++++++++++++++++++++++++++++++++++
**
*Material, Name=Material-1
*Elastic
210000, 0.3
*Plastic
345, 0
**
** Sections ++++++++++++++++++++++++++++++++++++++++++++++++
**
*Shell section, Elset=Internal_Selection-1_Shell_Section-2, Material=Material-1, Offset=0
50
*Shell section, Elset=Internal_Selection-1_Shell_Section-1, Material=Material-1, Offset=0
17
*Shell section, Elset=Internal_Selection-1_Shell_Section-3, Material=Material-1, Offset=0
16
*Shell section, Elset=Internal_Selection-1_Shell_Section-4, Material=Material-1, Offset=0
15
*Shell section, Elset=Internal_Selection-1_Shell_Section-5, Material=Material-1, Offset=0
14
*Shell section, Elset=Internal_Selection-1_Shell_Section-6, Material=Material-1, Offset=0
13
**
** Pre-tension sections ++++++++++++++++++++++++++++++++++++
**
**
** Constraints +++++++++++++++++++++++++++++++++++++++++++++
**
*Rigid body, Nset=Internal_Selection-1_Rigid_Body-1, Ref node=14107, Rot node=14108
*Rigid body, Nset=Internal_Selection-1_Rigid_Body-2, Ref node=14109, Rot node=14110
**
** Surface interactions ++++++++++++++++++++++++++++++++++++
**
**
** Contact pairs +++++++++++++++++++++++++++++++++++++++++++
**
**
** Amplitudes ++++++++++++++++++++++++++++++++++++++++++++++
**
**
** Initial conditions ++++++++++++++++++++++++++++++++++++++
**
**
** Steps +++++++++++++++++++++++++++++++++++++++++++++++++++
**
**
** Step-1 ++++++++++++++++++++++++++++++++++++++++++++++++++
**
*Step, Inc=100
*Static
0.1, 1, 1E-05, 0.1
**
** Controls ++++++++++++++++++++++++++++++++++++++++++++++++
**
**
** Output frequency ++++++++++++++++++++++++++++++++++++++++
**
*Output, Frequency=1
**
** Boundary conditions +++++++++++++++++++++++++++++++++++++
**
*Boundary, op=New
** Name: Fixed-1
*Boundary
14109, 1, 3, 0
14110, 1, 3, 0
** Name: Displacement_Rotation-1
*Boundary
14107, 3, 3, 0
14108, 1, 1, 0
**
** Loads +++++++++++++++++++++++++++++++++++++++++++++++++++
**
*Cload, op=New
*Dload, op=New
** Name: Concentrated_Force-1
*Cload
14107, 2, -4000
** Name: Concentrated_Force-2
*Cload
14107, 1, 1600
** Name: Moment-1
*Cload
14108, 3, -30000
** Name: Moment-2
*Cload
14108, 2, 20000
**
** Defined fields ++++++++++++++++++++++++++++++++++++++++++
**
**
** History outputs +++++++++++++++++++++++++++++++++++++++++
**
*Node print, Nset=Reference_Point-1_ref_14107, Totals=Yes
RF, U
*Node print, Nset=Reference_Point-1_rot_14108, Totals=Yes
RF, U
*Node print, Nset=Reference_Point-2_ref_14109, Totals=Yes
RF, U
*Node print, Nset=Reference_Point-2_rot_14110, Totals=Yes
RF, U
**
** Field outputs +++++++++++++++++++++++++++++++++++++++++++
**
*Node file
RF, U
*El file
S, E, NOE
**
** End step ++++++++++++++++++++++++++++++++++++++++++++++++
**
*End step
